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/batch
! ANSYS input file written by Workbench version 2026 R1
! File used for geometry attach: C:\Users\brand\Documents\AMM2\MVP-1\250Hz-negative.stp
/title,Unit cell simulation--Harmonic Acoustics (B5)
/com,--- Data in consistent MKS units. See Solving Units in the help system for more information.
/units,MKS
/prep7
! Turn off shape checking because checks already performed inside WB mesher.
! See help system for more information.
SHPP,OFF,,NOWARN
etcon,set             ! allow ANSYS to choose best KEYOP's for 180x elements, resets any applicable keyopt to MAPDL defaults
/com,*********** Send User Defined Coordinate System(s) ***********
local,12,0,-2.50831768429102e-002,7.67443445212066e-003,2.50149245333117e-002,0.,90.,0.
csys,0
/com,*********** Nodes for the whole assembly ***********
nblock,3,,13516
(1i9,3e20.9e3)
        1    -2.200000000E-02     1.500000000E-02     2.313167862E-02
        2    -2.200000000E-02     1.400000000E-02     2.413167862E-02
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-1
/com,*********** Elements for Body 1 '250Hz-negative|Solid6' ***********
et,1,221
r,1,2.e-005,101325.
keyo,1,2,1          ! uncoupled acoustic element without FSI
MAT,1 $ TYPE,1 $ REAL,1 $ SECNUM,1 $ ESYS,0    ! ELEMNODES = 10
eblock,21,COMPACT,,7490
(21i9)
        1      119      991     1862     1196     2557     8267     2561     2560     8262     9733
        2      119      991     1024     1862     2557     8259     2559     2561     8267     8440
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-1
secnum,1    ! reset the section ID to default
toffst,273.15,      ! Temperature offset from absolute zero
/com,*********** Set Reference Temperature ***********
tref,22.
/com,*********** Send Materials ***********
MP,MURX,1,1,
MP,DENS,1,1.225,	! kg m^-3
MP,SONC,1,346.25,	! m s^-1
MP,VISC,1,1.7894e-05,	! Pa s
MP,KXX,1,0.0242,	! W m^-1 C^-1
MP,C,1,1006.43,	! J kg^-1 C^-1

!************************* Model Summary ********************
! 250Hz-negative|Solid6,	Air 2,	matid,	1
!************************* End Model Summary ********************

/com,*********** Create Surface Velocity ***********
CMBLOCK,_CMACOUSTICSURFVELO47,NODE,       18
(8i10)
        16       -18        20        21        28        29       308      1952
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cmsel,s,_CMACOUSTICSURFVELO47
sf,_CMAcousticSURFVELO47,shld,1,0
allsel,all

fini
/solu
antype,harm
hropt,auto
thexpand,off     ! ignore thermal strains
kbc,1
harfrq,200,300
nsub,200
asol,scat,off
outres,erase
outres,all,none
outres,nsol,all
outres,eangl,all
outres,etmp,all
outres,veng,all
! *********** WB SOLVE COMMAND ***********
! check interactive state
*get,ANSINTER_,active,,int
*if,ANSINTER_,ne,0,then
/eof
*endif
solve
/com *************** Write FE CONNECTORS *********
CEWRITE,file,ce,,INTE
fini
*get,_NSOLTHREADS,active,0,ntfs
*get,_NSOLPROCESSES,active,0,npfs
/post1
fini
