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/batch
! ANSYS input file written by Workbench version 2026 R1
! File used for geometry attach: C:\Users\brand\Documents\AMM2\MVP-1\Acoustic simulation\Unit cell simulation_files\dp0\SYS\DM\SYS.scdocx
/title,Unit cell simulation--Harmonic Acoustics (B5)
/com,--- Data in consistent MKS units. See Solving Units in the help system for more information.
/units,MKS
/prep7
! Turn off shape checking because checks already performed inside WB mesher.
! See help system for more information.
SHPP,OFF,,NOWARN
etcon,set             ! allow ANSYS to choose best KEYOP's for 180x elements, resets any applicable keyopt to MAPDL defaults
/com,*********** Send User Defined Coordinate System(s) ***********
csys,0
/com,*********** Nodes for the whole assembly ***********
nblock,3,,13256
(1i9,3e20.9e3)
        1    -2.800000000E-02     2.100000000E-02     2.313167862E-02
        2    -2.800000000E-02     2.100000000E-02     2.713167862E-02
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-1
/com,*********** Elements for Body 1 'SYS\250Hz-negative' ***********
et,1,221
r,1,2.e-005,101325.
keyo,1,2,1          ! uncoupled acoustic element without FSI
MAT,1 $ TYPE,1 $ REAL,1 $ SECNUM,1 $ ESYS,0    ! ELEMNODES = 10
eblock,21,COMPACT,,7316
(21i9)
        1     1302     1833     1628     1727    10148    11850    10143    10145    12013    11849
        2     1236     1302     1833     1628     9886    10148     9889     9888    10143    11850
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-1
secnum,1    ! reset the section ID to default
toffst,273.15,      ! Temperature offset from absolute zero
/com,*********** Set Reference Temperature ***********
tref,22.
/com,*********** Send Materials ***********
MP,MURX,1,1,
MP,DENS,1,1.225,	! kg m^-3
MP,SONC,1,346.25,	! m s^-1
MP,VISC,1,1.7894e-05,	! Pa s
MP,KXX,1,0.0242,	! W m^-1 C^-1
MP,C,1,1006.43,	! J kg^-1 C^-1

!************************* Model Summary ********************
! SYS\250Hz-negative,	Air,	matid,	1
!************************* End Model Summary ********************

/com,*********** Create Acoustic Pressure ***********
CMBLOCK,_CMACOUSTICPRES46,NODE,       15
(8i10)
         1        -8      1835      1836      1838      1839      1841      1842
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cmsel,s,_CMACOUSTICPRES46
d,_CMAcousticPRES46,pres,1
allsel,all

fini
/solu
antype,harm
hropt,auto
thexpand,off     ! ignore thermal strains
kbc,1
harfrq,200,350
nsub,150
asol,scat,off
outres,erase
outres,all,none
outres,nsol,all
outres,eangl,all
outres,etmp,all
outres,veng,all
! *********** WB SOLVE COMMAND ***********
! check interactive state
*get,ANSINTER_,active,,int
*if,ANSINTER_,ne,0,then
/eof
*endif
solve
/com *************** Write FE CONNECTORS *********
CEWRITE,file,ce,,INTE
fini
*get,_NSOLTHREADS,active,0,ntfs
*get,_NSOLPROCESSES,active,0,npfs
/post1
fini
